σ := [0.1; 0.2; 0.2; 0.1; 0.4]
i := 2 .. 4
λ[0] := 12
α[1] := 1/σ[0]
α[i] := σ[i]/σ[0]
i := 1 .. 4
λ[i] := α[i]*λ[0]
λ = [12; 120; 24; 12; 48]
v := [0.0015; 0.001; 0.003; 0.002]
ρ[i] := λ[i]*v[i - 1]
R := sum(ρ)
ρ = [0; 0.18; 0.024; 0.036; 0.096]
R = 0.336
u[i] := v[i - 1]/(1 - ρ[i])
u = [0; 0.00182927; 0.00102459; 0.00311203; 0.00221239]
U := sum(u)
U = 0.00817828
