x := 0.5 + 0. - 10 .. 10
f(x) := 1i*x - sin(x) + 0.25
Re(f(x)) = [0.174849; 1.04849; 1.188; 0.46512; -0.45554; -0.72753; -0.100783; 0.848472; 1.24749; 0.729426; -0.229426; -0.747495; -0.348472; 0.600783; 1.22753; 0.95554; 0.03488; -0.688; -0.548487; 0.325151]
Im(f(x)) = [-9.5; -8.5; -7.5; -6.5; -5.5; -4.5; -3.5; -2.5; -1.5; -0.5; 0.5; 1.5; 2.5; 3.5; 4.5; 5.5; 6.5; 7.5; 8.5; 9.5]
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z(x, y) := x - sin(y) + 0.25
# [component: inputs z]
xmin := -5
xmax := 5
Δx := 0.2
i_max := (xmax - xmin)/Δx + 1
i_max = 51
i := 0 .. i_max - 1
x[i] := xmin + i*Δx
ymin := -3
ymax := 3
Δy := 0.1
j_max := (ymax - ymin)/Δy + 1
j_max = 61
j := 0 .. j_max - 1
y[j] := ymin + j*Δy
Z[i, j] := z(x[i], y[j])
# [component: inputs Z]
Z = [
    -4.60888, -4.51075, -4.41501, -4.32262, -4.2345, -4.15153, -4.07454, -4.00429, -3.9415, -3.88679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;
    -4.40888, -4.31075, -4.21501, -4.12262, -4.0345, -3.95153, -3.87454, -3.80429, -3.7415, -3.68679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;
    -4.20888, -4.11075, -4.01501, -3.92262, -3.8345, -3.75153, -3.67454, -3.60429, -3.5415, -3.48679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;
    -4.00888, -3.91075, -3.81501, -3.72262, -3.6345, -3.55153, -3.47454, -3.40429, -3.3415, -3.28679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;
    -3.80888, -3.71075, -3.61501, -3.52262, -3.4345, -3.35153, -3.27454, -3.20429, -3.1415, -3.08679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;
    -3.60888, -3.51075, -3.41501, -3.32262, -3.2345, -3.15153, -3.07454, -3.00429, -2.9415, -2.88679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;
    -3.40888, -3.31075, -3.21501, -3.12262, -3.0345, -2.95153, -2.87454, -2.80429, -2.7415, -2.68679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;
    -3.20888, -3.11075, -3.01501, -2.92262, -2.8345, -2.75153, -2.67454, -2.60429, -2.5415, -2.48679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;
    -3.00888, -2.91075, -2.81501, -2.72262, -2.6345, -2.55153, -2.47454, -2.40429, -2.3415, -2.28679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;
    -2.80888, -2.71075, -2.61501, -2.52262, -2.4345, -2.35153, -2.27454, -2.20429, -2.1415, -2.08679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]
