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x - sin(x) + 0.25 == 0
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-1.1712296525
A := [
    0.405, 0.05, 0.04, 0, 0.09;
    -0.061, 0.53, 0.073, 0.11, -0.06;
    0.07, -0.36, 0.38, 0.03, 0.02;
    -0.05, 0, 0.066, 0.58, 0.23;
    0, 0.081, -0.05, 0, 0.41
]
b := [-1.475; 2.281; 0.296; 0.492; 1.454]
x := 0
res := lsolve(A, b)
r := root(x - sin(x) + 0.25, x)
r = -1.17123
res = [-5.37836; 3.68606; 5.20451; -1.57683; 3.45282]
x^5 - x - 0.2
x := -1
v := [-0.2; -1; 0; 0; 0; 1]
y := -1
Given
x - sin(x) + 0.25 - y == 0
-x - y == 0
x := 13
v_res := polyroots(v)
integral(x - sin(x) + 0.25, x = 1 .. 3) = 2.96971
v_res = [-0.942087; -0.200323; 0.0488239 + 1.00597i; 0.0488239 - 1.00597i; 1.04476]
d/dx(x - sin(x) + 0.25) = 0.0925532
Find(x, y) = [-0.247481; 0.247481]
x - sin(x) + 0.25
x - sin(x) + 0.25
1 - cos(x)
cos(x) + x^2/2 + 0.25*x
d/dx(x - sin(x) + 0.25)
integral(x - sin(x) + 0.25, x)
cos(x) + x^2/2 + 0.25*x
1 - cos(x)
