b2 := [1; 0; 0; 0; 0; 0]
A2(n) := [
    1, 0, 0, 0, 0, 0;
    1, -1, 0, 2/n, 0, 0;
    0, (n - 1)/n, -1, 0, 0, 0;
    0, 0, 1, -1, 0, 1;
    0, 0, 0, (n - 2)/n, -1, 0;
    0, 0, 0, 0, 1, -1
]
N1(n) := lsolve(A2(n), b2)
trudV := [1; 2; 1; 2; 1; 1]
N1(10) = [1; 10; 9; 45; 36; 36]
OcpV(n) := N1(n)*trudV
OcpV(10) = 192
b3 := [1; 0; 0; 0; 0; 0; -1; 0]
A3(n) := [
    1, 0, 0, 0, 0, 0, 0, 0;
    0, -1, 0, 1/2, 0, 0, 1, 0;
    0, (n - 1)/n, -1, 0, 0, 0, 0, 0;
    0, 0, 1, -1, 0, 0, 0, 0;
    0, 0, 0, 1/2, -1, 0, 0, 0;
    0, 0, 0, 0, 1, -1, 0, 0;
    0, 0, 0, 0, 0, 1, -1, 0;
    0, 1/n, 0, 0, 0, 0, 0, -1
]
N2(n) := lsolve(A3(n), b3)
trudV2 := [1; 2; 1; 1; 1; 3; 1; 0]
N2(10) = [1; 10; 9; 9; 4.5; 4.5; 5.5; 1]
OcpV2(n) := N2(n)*trudV2
OcpV2(10) = 62.5
x(n) := 6*n
x1(n) := 7*n
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y(n) := 19 + n^2.053
y1(n) := 19 + n^2.049
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