i := 1, 2 .. 10
n := 10
A := [46, 45, 48, 45, 44, 45, 43, 44, 42, 48]
B := [31, 31, 31, 31, 31, 32, 32, 32, 32, 32]
C := [45, 45, 43, 42, 43, 45, 44, 46, 41, 45]
A := sqrt(1/(n - 1)*sum((A[0, i] - 45)^2, i = 0 .. n - 1)) = 1.94365
B := sqrt(1/(n - 1)*sum((B[0, i] - 31.9)^2, i = 0 .. n - 1)) = 0.674949
C := sqrt(1/(n - 1)*sum((C[0, i] - 43.9)^2, i = 0 .. n - 1)) = 1.59513
s(x) := A/sqrt(n) = 0.614636
s(x) := B/sqrt(n) = 0.213437
s(x) := C/sqrt(n) = 0.504425
