f(x) := 10*x*ln(x) - x^2/2
# Исследуемая функция, интервал исследования [0.5,1]
# погрешность вычислений ε=0.05
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# Итерация 1
a[0] := 0.5
b[0] := 1
L[0] := b[0] - a[0]
L[0] = 0.5
f(a[0]) = -3.59074
f(b[0]) = -0.5
xm[0] := (a[0] + b[0])/2
xm[0] = 0.75
f(xm[0]) = -2.43887
x1[0] := a[0] + L[0]/4
x2[0] := b[0] - L[0]/4
x1[0] = 0.625
x2[0] = 0.875
f(x1[0]) = -3.13284
f(x2[0]) = -1.55121
# Сравним f(x1_0) и f(xm_0)
f(x1[0]) < f(xm[0])
# Положим
a[1] := a[0] = 0.5
b[1] := xm[0] = 0.75
xm[1] := x1[0] = 0.625
# Получим
L[1] := b[1] - a[1]
L[1] = 0.25
L[1] > ε  # следовательно - переходим к следующей итерации
# Итерация 2
x1[1] := a[1] + L[1]/4
x2[1] := b[1] - L[1]/4
x1[1] = 0.5625
x2[1] = 0.6875
f(xm[1]) = -3.13284
f(x1[1]) = -3.39463
f(x2[1]) = -2.81235
# Сравним f(x1_1) и f(xm_1)
f(x1[1]) < f(xm[1])
# Положим
a[2] := a[1] = 0.5
b[2] := xm[1] = 0.625
xm[2] := x1[1] = 0.5625
# Получим
L[2] := b[2] - a[2]
L[2] = 0.125
L[2] > ε  # следовательно - переходим к следующей итерации
# Итерация 3
x1[2] := a[2] + L[2]/4
x2[2] := b[2] - L[2]/4
x1[2] = 0.53125
x2[2] = 0.59375
f(xm[2]) = -3.39463
f(x1[2]) = -3.50139
f(x2[2]) = -3.27147
# Сравним f(x1_2) и f(xm_2)
f(x1[2]) < f(xm[2])
# Положим
a[3] := a[2] = 0.5
b[3] := xm[2] = 0.5625
xm[3] := x1[2] = 0.53125
# Получим
L[3] := b[3] - a[3]
L[3] = 0.0625
L[3] > ε  # следовательно - переходим к следующей итерации
# Итерация 4
x1[3] := a[3] + L[3]/4
x2[3] := b[3] - L[3]/4
x1[3] = 0.515625
x2[3] = 0.546875
f(xm[3]) = -3.50139
f(x1[3]) = -3.54831
f(x2[3]) = -3.45012
# Сравним f(x1_3) и f(xm_3)
f(x1[3]) < f(xm[3])
# Положим
a[4] := a[3] = 0.5
b[4] := xm[3] = 0.53125
xm[4] := x1[3] = 0.515625
# Получим
L[4] := b[4] - a[4]
L[4] = 0.03125
L[4] < ε  # следовательно - процесс завершается
f(xm[4]) = -3.54831
x := (a[4] + b[4])/2 = 0.515625
