x1 := 0
x2 := 0
f(x1, x2) := 1.6*x1 + 10*x2
Given
x1 ≥ 0
x2 ≥ 0
# Целочисленность нарушена по переменным
# x1 и x2. На основании полученного решения вводим
# дополнительные ограничения по переменным x1 и x2
#
# x1 <= [2.3]  и  x1 >= [2.3] + 1
# x2 <= [1.3]  и  x2 >= [1.3] + 1
-2*x1 + x2 ≤ -3.3
x1 - x2 ≤ 1
Minimize(f, x1, x2) = [2.3; 1.3]
f(2.3, 1.3) = 16.68
# Введём дополнительное ограничение для x1
Given
x1 ≥ 0
x2 ≥ 0
x1 ≥ 3
-2*x1 + x2 ≤ -3.3
x1 - x2 ≤ 1
Minimize(f, x1, x2) = [3; 2]
f(3, 2) = 24.8
# Теперь введём второе дополнительное ограничение для x1
Given
x1 ≥ 0
x2 ≥ 0
x1 ≤ 2
-2*x1 + x2 ≤ -3.3
x1 - x2 ≤ 1
# Задача не имеет допустимых решений. ОДР представ-
# ляет собой пустое множество
Minimize(f, x1, x2) =  # error: This variable is undefined.
# Введём дополнительное ограничение для x2
Given
x1 ≥ 0
x2 ≥ 0
x2 ≥ 2
# Так как текущее решение меньше предыдущего --
# прекращаем просмотр этой вершины
-2*x1 + x2 ≤ -3.3
x1 - x2 ≤ 1
Minimize(f, x1, x2) = [2.65; 2]
f(2.65, 2) = 24.24
# Теперь введём второе дополнительное ограничение для x2
Given
x1 ≥ 0
x2 ≥ 0
x2 ≤ 1
-2*x1 + x2 ≤ -3.3
x1 - x2 ≤ 1
# Задача не имеет допустимых решений. ОДР представ-
# ляет собой пустое множество
Minimize(f, x1, x2) =  # error
