f(x) := 10*x*ln(x) - x^2/2
# Исследуемая функция, интервал исследования [0.5,1]
# погрешность вычислений ε=0.05
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# Итерация 1
i := 10
N := 6
k := 0
Fib := [1; 1; 2; 3; 5; 8; 13; 21; 34; 55; 89; 144]
a[0] := 0.5
b[0] := 1
y[0] := a[0] + (b[0] - a[0])*Fib[N - 2]/Fib[N]
y[0] = 0.692308
f(y[0]) = -2.78543
z[0] := a[0] + (b[0] - a[0])*Fib[N - 1]/Fib[N]
z[0] = 0.807692
f(z[0]) = -2.05121
# Сравним f(y_0) и f(z_0)
# Так как f(y_0) < f(z_0), то
a[1] := a[0]
# и
b[1] := z[0]
z[1] := y[0]
y[1] := a[1] + (b[1] - a[1])*Fib[N - k - 2]/Fib[N - k - 1]
z[1] = 0.692308
# Проверим условие окончания:
k := 0 ≠ N - 3
# Итерация 2
k := 1
f(y[1]) = -2.78543
f(z[1]) = -2.78543
# Сравним f(y_1) и f(z_1)
# Так как f(y_1) = f(z_1), то
a[2] := a[1]
b[2] := z[1] = 0.692308
z[2] := y[1]
y[2] := a[2] + (b[2] - a[2])*Fib[N - k - 3]/Fib[N - k - 1]
y[2] = 0.576923
# Проверим условие окончания:
k := 1 ≠ N - 3
# Итерация 3
k := 2
f(y[2]) = -3.33976
f(z[2]) = -2.78543
# Сравним f(y_2) и f(z_2)
# Так как f(y_2) < f(z_2), то
a[3] := a[2] = 0.5
b[3] := b[2] = 0.692308
y[3] := y[2]
z[3] := a[3] + (b[3] - a[3])*Fib[N - k - 2]/(N - 2 - 1)
z[3] = 0.628205
# Проверим условие окончания:
k := 2 ≠ N - 3
# Итерация 4
k := 3
f(y[3]) = -3.33976
f(z[3]) = -3.11777
# Сравним f(y_3) и f(z_3)
# Так как f(y_3) < f(z_3), то
a[4] := a[3]
b[4] := z[3] = 0.628205
z[4] := y[3] = 0.576923
y[4] := a[4] + (b[4] - a[4])*Fib[N - k - 3]/Fib[N - k - 1]
y[4] = 0.564103
f(y[4]) = -3.3887
f(z[4]) = -3.33976
# Проверим условие окончания:
k := 3  # =N-3
x := (a[4] + b[4])/2 = 0.564103
f(x) = -3.3887
# Поиск завершен
