x0 := [1; 3]
f(x1, x2) := x1^2 + 3*x2^2 + x1*x2 + 5*x1 + 3*x2
x1 := x0[0]
x2 := x0[1]
k := d/dx1(f(x1, x2))
k = 10
h := d/dx2(f(x1, x2))
h = 22
gradF(x0) := [10; 22]
H := [d^2/dx1^2(f(x1, x2)), d/dx1(d/dx2(f(x1, x2))); d/dx1(d/dx2(f(x1, x2))), d^2/dx2^2(f(x1, x2))]
H = [2, 1; 1, 6]
|H| = 11
H^-1 = [0.545455, -0.0909091; -0.0909091, 0.181818]
xn := x0 - H^-1*gradF(x0)
xn = [-2.45455; -0.0909091]
# Ответ
xmin := xn
xmin = [-2.45455; -0.0909091]
fmin := f(xmin[0], xmin[1]) = -6.27273
