f(x) := 10*x*ln(x) - x^2/2
# Исследуемая функция, интервал исследования [0.5,1]
# погрешность вычислений ε=0.05
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# Итерация 1
x[1] := 0.5
Δx := 0.15
ε := 0.05
x[2] := x[1] + Δx
x[2] = 0.65
f(x[1]) = -3.59074
f(x[2]) = -3.01134
# Сравним f(x_1) и f(x_2)
# Так как f(x_1) < f(x_2)
x[3] := x[1] - Δx
x[3] = 0.35
f(x[3]) = -3.73563
# Найдем F_min={-2,-5.746,-7.438}
xmin := x[1] = 0.5
Fmin := f(x[1]) = -3.59074
α[1] := (f(x[2]) - f(x[1]))/(x[2] - x[1]) = 3.86265
α[2] := (1/(x[3] - x[2]))*((f(x[3]) - f(x[1]))/(x[3] - x[1]) - α[1]) = 9.65568
xs := 1/2*(x[2] + x[1]) - α[1]/(2*α[2]) = 0.374981
f(xs) = -3.74842
# Проверяем выполнение условий окончания поиска:
U1 := |(Fmin - f(xs))/f(xs)| = 0.0420665  # < ε
U2 := |(xmin - xs)/xs| = 0.333403  # > ε
# Условия не выполнены
# Итерация 2
# так как точка xs не принадлежит области
x[1] := xs
x[2] := x[1] + Δx
x[2] = 0.524981
f(x[1]) = -3.74842
f(x[2]) = -3.52075
# Сравним f(x_1) и f(x_2)
# Так как f(x_1) < f(x_2)
x[3] := x[1] - Δx
x[3] = 0.224981
f(x[3]) = -3.38144
# Найдем F_min={-2,-5.746,-7.438}
xmin := x[1] = 0.374981
Fmin := f(x[1]) = -3.74842
α[1] := (f(x[2]) - f(x[1]))/(x[2] - x[1]) = 1.51782
α[2] := (1/(x[3] - x[2]))*((f(x[3]) - f(x[1]))/(x[3] - x[1]) - α[1]) = 13.2146
xs := 1/2*(x[2] + x[1]) - α[1]/(2*α[2]) = 0.392551
f(xs) = -3.74775
# Проверяем выполнение условий окончания поиска:
U1 := |(Fmin - f(xs))/f(xs)| = 0.000178757  # < ε
U2 := |(xmin - xs)/xs| = 0.0447592  # < ε
# Условия выполнены
