f(x1, x2) := x1^2 + 3*x2^2 + x1*x2 + 5*x1 + 3*x2
N := 2
α := 1.691
δ[1] := α*(sqrt(N + 1) + N - 1)/(N*sqrt(2)) = 1.63338
δ[2] := α*(sqrt(N + 1) - 1)/(N*sqrt(2)) = 0.437663
X0 := [1; 3]
f(X0[0], X0[1]) = 45
X1 := [X0[0] + δ[1]; X0[1] + δ[2]] = [2.63338; 3.43766]
f(X1[0], X1[1]) = 74.9198
X2 := [X0[0] + δ[2]; X0[1] + δ[1]] = [1.43766; 4.63338]
f(X2[0], X2[1]) = 94.2212
# Выбираем вершину, в которой функция максимальна. Отражаем вершину X2
X3 := X1 + X0 - X2 = [2.19572; 1.80428]
f(X3[0], X3[1]) = 34.9406
# Выбираем вершину, в которой функция максимальна. Отражаем вершину X1
X4 := X3 + X0 - X1 = [0.562337; 1.36662]
f(X4[0], X4[1]) = 13.5992
# Выбираем вершину, в которой функция максимальна. Отражаем вершину X0
X5 := X4 + X3 - X0 = [1.75805; 0.170902]
f(X5[0], X5[1]) = 12.7818
# Выбираем вершину, в которой функция максимальна. Отражаем вершину X3
X6 := X4 + X5 - X3 = [0.124674; -0.266761]
f(X6[0], X6[1]) = 0.0188565
# Выбираем вершину, в которой функция максимальна. Отражаем вершину X4
X7 := X5 + X6 - X4 = [1.32039; -1.46248]
f(X7[0], X7[1]) = 8.44344
# Выбираем вершину, в которой функция максимальна. Отражаем вершину X5
X8 := X7 + X6 - X5 = [-0.312989; -1.90014]
f(X8[0], X8[1]) = 4.25893
# Выбираем вершину, в которой функция максимальна. Отражаем вершину X7
X9 := X8 + X6 - X7 = [-1.50871; -0.704424]
f(X9[0], X9[1]) = -4.8292
# Выбираем вершину, в которой функция максимальна. Отражаем вершину X8
X10 := X9 + X6 - X8 = [-1.07104; 0.928956]
f(X10[0], X10[1]) = 0.172713
# Выбираем вершину, в которой функция максимальна. Отражаем вершину X6
X11 := X10 + X8 - X6 = [-1.50871; -0.704424]
f(X11[0], X11[1]) = -4.8292
