f(x1, x2) := x1^2 + 3*x2^2 + x1*x2 + 5*x1 + 3*x2
f1(x1, x2) := 2*x1 + x2 + 5
f2(x1, x2) := x1 + 6*x2 + 3
f1(1, 3) = 10
f2(1, 3) = 22
25.773 - 148 = -122.227
sqrt((-0.062 + 1.36)^2 + (-1.896 + 1.8)^2) = 1.30155
f(1, 3) = 45
f(1 - 0.08*42, 3 - 0.08*60) = 2.3376
13.608 - 25.773 = -12.165
f1(1 - 0.08*42, 3 - 0.08*60) = -1.52
f2(1 - 0.08*42, 3 - 0.08*60) = -10.16
f2(-1.041, 0.87) = 7.179
sqrt(10^2 + 22^2) = 24.1661
f2(0.04, 1.416) = 11.536
f(0, 0.8) = 4.32
f(-1, -1.4) = -0.92
f(0.2, 1.24) = 9.6208
g0 := [6.28; 10.64] - [10; 22] = [-3.72; -11.36]
ΔX := [0.2; 1.24] - [1; 3] = [-0.8; -1.76]
A0 := [-0.8; -1.76]*[-0.8, -1.76]/([-0.8, -1.76]*[-3.72; -11.36]) - [1, 0; 0, 1]*[-3.72; -11.36]*[-3.72, -11.36]*[1, 0; 0, 1]/([-3.72, -11.36]*[1, 0; 0, 1]*[-3.72; -11.36]) = [-0.068985, -0.234452; -0.234452, -0.768296]
A1 := [1, 0; 0, 1] + [-0.069, -0.234; -0.234, -0.768] = [0.931, -0.234; -0.234, 0.232]
[0.992, -0.052; -0.052, 0.847]*□
S1 := -[0.931, -0.234; -0.234, 0.232]*[6.28; 10.64] = [-3.35692; -0.99896]
X2 := [0.2; 1.24] + [-3.357; -0.999]*0.4 = [-1.1428; 0.8404]
f(-1.143, 0.84) = -0.731871
sqrt((-1.143 - 0.2)^2 + (0.84 - 1.24)^2) =  # no stored result
f1(0.2, 1.24) = 6.64
f2(-1.143, 0.84) = 6.897
6.897 - 6.64 = 0.257
-0.921 - 13.608 = -14.529
[-0.228, -0.407; -0.407, -0.727] + [1, 0; 0, 1] = [0.772, -0.407; -0.407, 0.273]
[1, 0; 0, 1]*[40; 66] = [40; 66]
[0.772, -0.407; -0.407, 0.273]*[19.648; 29.808] = [3.0364; 0.140848]
f(-0.1476, 1.4) = 9.15715
ΔX := [-1.143; 0.84] - [0.2; 1.24] = [-1.343; -0.4]
g1 := [3.554; 6.897] - [6.28; 10.64] = [-2.726; -3.743]
A1 := [-1.343; -0.4]*[-1.343, -0.4]/([-1.343, -0.4]*[-2.726; -3.743]) - [0.931, -0.234; -0.234, 0.232]*[-2.726; -3.743]*[-2.726, -3.743]*[0.931, -0.234; -0.234, 0.232]/([-2.726, -3.743]*[0.931, -0.234; -0.234, 0.232]*[-2.726; -3.743]) = [-0.162509, 0.0331163; 0.0331163, 0.0211683]
A2 := [0.931, -0.234; -0.234, 0.232] + [-0.163, 0.033; 0.033, 0.021] = [0.768, -0.201; -0.201, 0.253]
S2 := -[0.768, -0.201; -0.201, 0.253]*[3.554; 6.897] = [-1.34317; -1.03059]
X3 := [-1.143; 0.84] + [-1.343; -1.031]*0.056 = [-1.21821; 0.782264]
f(X3[0], X3[1]) = -1.37737
sqrt((-1.218 + 1.143)^2 + (0.782 - 0.84)^2) = 0.0948103
f1(-1.218, -1.031) = 1.533
f2(-1.143, 0.84) = 6.897
1.533 - 6.897 = -5.364
(-[-1.041; 0.87] + [0; -1])/[-0.784; -22.46] = [-1.32781; 0.0832591]
X3 := [-0.015; -0.87]*1 = [-0.015; -0.87]
f(X3[0], X3[1]) = -0.401025
